<?xml version="1.0"?>
<!--
  File:     rotax912is.xml
  Author:   Aleksey Matyushev

  Inputs:
    name:           Rotax 912is
    type:           piston
    power:          100.0 hp
    augmented?      no
    injected?       no
-->

<piston_engine name="rotax912is">
  <minmp unit="INHG">        19.0  </minmp>	<!-- Deprecated -->
  <maxmp unit="INHG">        27.5  </maxmp>
  <displacement unit="IN3">  82.6  </displacement>
  <maxhp>                   100.0  </maxhp>
  <bsfc>                      0.79 </bsfc> <!-- rough first cut from Google @ 75% power, needs to be validated -->
  <cycles>                    4.0  </cycles>
  <idlerpm>                1235.0  </idlerpm> <!-- 3000 engine rpm / 2.43 gearbox ratio -->
  <maxrpm>                 2387.0  </maxrpm> <!-- 5800 engine rpm / 2.43 gearbox ratio -->
  <maxthrottle>               1.0  </maxthrottle>
  <minthrottle>               0.1  </minthrottle>
  <sparkfaildrop>             0.1 </sparkfaildrop>
</piston_engine>
